l(i, n, t, τ) := product(if(i ≠ j, (t - τ[j])/(τ[i] - τ[j]), 1), j = 0 .. n - 1)
generate_tau(U, normalized) :=
    n ← cols(U)
    if normalized ≠ 0
        for i ∈ 0 .. n - 1
            τ[i] ← i
        ""
    if normalized == 0
        for i ∈ 0 .. n - 1
            τ[i] ← |U[:, mod(i + 1, n - 1)] - U[:, i]| + if(i == 0, 0, τ[i - 1])
        ""
    τ
get_normalized_L(U, t) :=
    n ← cols(U)
    τ ← generate_tau(U, 1)
    for i ∈ 0 .. n - 1
        L[i] ← l(i, n, t, τ)
    L
push_back(U, p) :=
    if U == 0
        ""
        p
    if U ≠ 0
        ""
        augment(U, p)
p(U) :=
    j ← 0
    n ← cols(U)
    for t_range ∈ 0, 0.1 .. n - 1
        L ← get_normalized_L(U, t_range)
        P ← push_back(P, sum(U[:, i]*L[i], i = 0 .. n - 1))
        j ← j + 1
    P
U := [0, 1, 2, 3, 6; 0, 1, 4, 9, 13]
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